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p := 10^-12
n := 10^-9
u := 10^-6
m := 10^-3
k := 10^3
M := 10^6
V_IN := 22.2
V_OUT := 3.3
I_OUT := 1
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R_2 := 18 k
R_1 := R_2*(V_OUT/0.8 - 1) = 56.25 k
R_1 := 56 k
R_2 := 18 k
V_OUT := 0.8*(R_1/R_2 + 1) = 3.28889
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f_sw := 500 k
ΔI_L := 0.4*2
L := V_OUT*(V_IN - V_OUT)/(V_IN*ΔI_L*f_sw) = 7.00412 u
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I_L_PEAK := I_OUT + ΔI_L/2 = 1.4
